*Heading
** Job name: spheretest Model name: Model-1
** Generated by: Abaqus/CAE 6.14-2
*Preprint, echo=NO, model=NO, history=NO, contact=NO
**
** PARTS
**
*Part, name=Part-1
*Node
      1,   1.95090318,   9.80785275,           0.
      2,   3.82683444,   9.23879528,           0.
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*Element, type=C3D10
   1,  432,  433,  434,  435, 1052, 1051, 1050, 1054, 1053, 1055
   2,  432,  436,  434,  437, 1057, 1056, 1050, 1059, 1058, 1060
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*Nset, nset=Set-1
    1,    2,    3,    4,    5,    6
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*Elset, elset=Set-1
   47,   77,   79,  114,  137,  171
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*Nset, nset=Set-2
    1,    2,    3,    4,    5,    6
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*Elset, elset=Set-2
   47,   77,   79,  114,  137,  171
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*Nset, nset=Set-6, generate
    1,  7425,     1
*Elset, elset=Set-6, generate
    1,  4899,     1
*Elset, elset=_Surf-1_S3, internal
   47,   77,   79,  114,  137,  171
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*Elset, elset=_Surf-1_S4, internal
  193,  267,  612,  673,  693,  907
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*Elset, elset=_Surf-1_S1, internal
  913, 1151, 1165, 1209, 1531, 1781, 1880, 2229, 3822, 3949, 4057, 4098, 4224, 4451
*Elset, elset=_Surf-1_S2, internal
 1667, 1702, 1721, 1996, 2194, 2230
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*Surface, type=ELEMENT, name=Surf-1
_Surf-1_S3, S3
_Surf-1_S4, S4
_Surf-1_S2, S2
_Surf-1_S1, S1
** Section: Section-1
*Solid Section, elset=Set-6, material=Material-1
,
*End Part
**
**
** ASSEMBLY
**
*Assembly, name=Assembly
**
*Instance, name=Part-1-1, part=Part-1
*End Instance
**
*Nset, nset=Set-3, instance=Part-1-1
 14,
*End Assembly
**
** MATERIALS
**
*Material, name=Material-1
*Density
 1.3,
*Hyperelastic, test data input, poisson=0.2
*Uniaxial Test Data, smooth=3
 -931.631,  -0.785539
 -738.682,  -0.736707
 -588.648,  -0.687736
 -445.034,  -0.638538
 -332.846,  -0.589576
 -251.409,  -0.540394
 -194.639,  -0.490915
 -150.034,  -0.441747
 -115.567,  -0.392739
 -88.5337,  -0.343703
 -67.2451,  -0.294603
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  738.682,   0.736707
** ----------------------------------------------------------------
**
** STEP: Step-1
**
*Step, name=Step-1, nlgeom=YES
*Dynamic,application=QUASI-STATIC,initial=NO
1., 1., 1e-05, 1.
**
** BOUNDARY CONDITIONS
**
** Name: BC-1 Type: Displacement/Rotation
*Boundary
